!**************************************************
! SOLVE
!**************************************************
!
! ANALYSIS TO SOLVE (analysis_to_solve)
! 1 - pressure
! 2 - temperature
! 3 - structural
! 5 - quasi-transient
! 4 - modal
!
analysis_to_solve=2
!
!**************************************************
! BOUNDARY CONDITIONS
!**************************************************
!
/SOLU
DK,1,,,,0,ALL                                       ! Fix in first point
*IF,analysis_to_solve,NE,3,AND,analysis_to_solve,NE,5,THEN
    DK,n_points,,,,0,ALL                            ! Fix in last point if analysis is not structural or transient
*ENDIF
!
/PBC,ALL,,1                                         ! Plot to show applied boundary conditions
LPLOT
/ESHAPE,1.0                                         ! Turn on display of element
!
!
*IF,analysis_to_solve,EQ,1,THEN
    !**************************************************
    ! PRESSURE ANALYSIS SOLVE
    !**************************************************
    !
    ESEL,ALL                                             ! Select all elements
    SFE,ALL,1,PRES,,internal_pressure                    ! Internal pressure
    SFE,ALL,2,PRES,,external_pressure                    ! External pressure
    !
    ANTYPE,static                                        ! To perform static analysis
    SOLVE
    FINISH
    !
*ELSEIF,analysis_to_solve,EQ,2,THEN
    !**************************************************
    ! TEMPERATURE ANALYSIS SOLVE
    !**************************************************
    !
    ESEL,ALL                                             ! Select all elements
    BFE,ALL,TEMP,1,external_temperature,internal_temperature,,  ! External and internal temperature
    !
    ANTYPE,static                                        ! To perform static analysis
    SOLVE
    FINISH
    !
*ELSEIF,analysis_to_solve,EQ,3,THEN
    !**************************************************
    ! STRUCTURAL ANALYSIS SOLVE
    !**************************************************
    !
    ! TODO: ADD load in X direction
    !
    ANTYPE,static                                        ! To perform static analysis
    NLGEOM,OFF                                           ! Ignores large-deflection effects (that is, a small-deflection analysis is specified)
    SOLVE
    FINISH
    !
*ELSEIF,analysis_to_solve,EQ,4,THEN
    !**************************************************
    ! QUASI-TRANSIENT ANALYSIS SOLVE
    ! Reads information from mission_data.csv
    !**************************************************
    !
    ANTYPE,static                                        ! To perform static analysis
    NLGEOM,ON                                            ! Includes large-deflection (large rotation) effects or large strain effects, according to the element type.
    *DO,c_arc,1,n_arcs
        ESEL,ALL                                             ! Select all elements
        SFE,ALL,1,PRES,,internal_pressure                    ! Internal pressure
        SFE,ALL,2,PRES,,external_pressure                    ! External pressure
        BFE,ALL,TEMP,1,external_temperature,internal_temperature,,
        ! TODO: ADD load in X direction
        !
        SOLVE
    *ENDDO
    !
    FINISH
    !
*ELSEIF,analysis_to_solve,EQ,5,THEN
    !**************************************************
    ! MODAL ANALYSIS SOLVE
    !**************************************************
    ANTYPE,modal                                        ! To perform modal analysis
    modopt,lanb,modes                                   ! Mode-extraction method, used Block Lanczos with # modes to extract
    lumpm,on                                            ! Lumped Mass Approximation
    mxpand,modes,,,yes
    !
    SOLVE                                               ! Solve model
    FINISH
    !
*ENDIF
